 <aerodynamics>

  <axis name="LIFT">

    <function name="aero/force/Lift_alpha">
      <description>Lift due to alpha</description>
      <product>
          <property>aero/qbar-psf</property>
          <property>metrics/Sw-sqft</property>
          <table>
            <independentVar lookup="row">aero/alpha-rad</independentVar>
            <tableData>
              -1.87 -0.3
              -1.57  0.0
              -1.27  0.3
              -0.80  0.2
               0.00  0.0
               0.80  0.2
               1.27  0.2
               1.57  0.0
               1.87 -0.2
            </tableData>
          </table>
      </product>
    </function>

  </axis>

  <axis name="DRAG">

    <function name="aero/force/Drag_basic">
       <description>Drag at zero lift</description>
       <product>
          <property>aero/qbar-psf</property>
          <property>metrics/Sw-sqft</property>
          <table>
            <independentVar lookup="row">aero/alpha-rad</independentVar>
            <tableData>
             -1.57    0.128
             -1.27    0.166
              0.00    1.500
              1.27    0.166
              1.57    0.128
            </tableData>
          </table>
       </product>
    </function>

    <function name="aero/force/Drag_induced">
       <description>Induced drag</description>
         <product>
           <property>aero/qbar-psf</property>
           <property>metrics/Sw-sqft</property>
           <property>aero/cl-squared</property>
           <value>0.04</value>
         </product>
    </function>

    <!--<function name="aero/force/Drag_beta">-->
       <!--<description>Drag due to sideslip</description>-->
       <!--<product>-->
          <!--<property>aero/qbar-psf</property>-->
          <!--<property>metrics/Sw-sqft</property>-->
          <!--<table>-->
            <!--<independentVar lookup="row">aero/beta-rad</independentVar>-->
            <!--<tableData>-->
              <!---1.57       1.230-->
              <!---0.26    0.050-->
               <!--0.00       0.000-->
               <!--0.26    0.050-->
               <!--1.57       1.230-->
            <!--</tableData>-->
          <!--</table>-->
       <!--</product>-->
    <!--</function>-->

  </axis>

  <!--<axis name="SIDE">-->

    <!--<function name="aero/force/Side_beta">-->
       <!--<description>Side force due to beta</description>-->
       <!--<product>-->
           <!--<property>aero/qbar-psf</property>-->
           <!--<property>metrics/Sw-sqft</property>-->
           <!--<property>aero/beta-rad</property>-->
           <!--<value>-1</value>-->
       <!--</product>-->
    <!--</function>-->

  <!--</axis>-->

 </aerodynamics>
