<?xml version="1.0"?>
<?xml-stylesheet type="text/xsl" href="http://jsbsim.sourceforge.net/JSBSim.xsl"?>
<fdm_config name="QUAD COMPLETE EXT" version="2.0" release="BETA" xmlns:xsi="http://www.w3.org/2001/XMLSchema-instance" xsi:noNamespaceSchemaLocation="http://jsbsim.sourceforge.net/JSBSim.xsd">

  <fileheader>
    <author>Ewoud Smeur</author>
    <filecreationdate>07-03-2017</filecreationdate>
    <version>Version 0.9 - beta</version>
    <description>Cyclone</description>
  </fileheader>

  <metrics>
    <wingarea unit="IN2">134</wingarea>
    <wingspan unit="IN"> 18.9 </wingspan>
    <chord unit="IN"> 7.09 </chord>
    <htailarea unit="FT2"> 0 </htailarea>
    <htailarm unit="FT"> 0 </htailarm>
    <vtailarea unit="FT2"> 0 </vtailarea>
    <vtailarm unit="FT"> 0 </vtailarm>
    <wing_incidence unit="DEG"> 90 </wing_incidence>
    <location name="AERORP" unit="IN">
      <x> 0 </x>
      <y> 0 </y>
      <z> 0 </z>
    </location>
    <location name="EYEPOINT" unit="IN">
      <x> 0 </x>
      <y> 0 </y>
      <z> 0 </z>
    </location>
    <location name="VRP" unit="IN">
      <x> 0 </x>
      <y> 0 </y>
      <z> 0 </z>
    </location>
  </metrics>

  <mass_balance>
    <ixx unit="SLUG*FT2"> 0.0045 </ixx>
    <iyy unit="SLUG*FT2"> 0.00125 </iyy>
    <izz unit="SLUG*FT2"> 0.00224 </izz>
    <ixy unit="SLUG*FT2"> 0. </ixy>
    <ixz unit="SLUG*FT2"> 0. </ixz>
    <iyz unit="SLUG*FT2"> 0. </iyz>
        <emptywt unit="LBS"> 0.88 </emptywt>
    <location name="CG" unit="M">
      <x> 0 </x>
      <y> 0 </y>
      <z> 0 </z>
    </location>
  </mass_balance>

  <ground_reactions>
    <contact type="STRUCTURE" name="CONTACT_FRONT">
      <location unit="M">
        <x>-0.15 </x>
        <y> 0 </y>
        <z>-0.1 </z>
      </location>
      <static_friction>  0.8 </static_friction>
      <dynamic_friction> 0.5 </dynamic_friction>
      <spring_coeff unit="N/M"> 500 </spring_coeff>
      <damping_coeff unit="N/M/SEC"> 100 </damping_coeff>
      <damping_coeff_rebound type="SQUARE" unit="N/M2/SEC2"> 1000 </damping_coeff_rebound>
      <max_steer unit="DEG"> 0.0 </max_steer>
      <brake_group> NONE </brake_group>
      <retractable>0</retractable>
    </contact>

    <contact type="STRUCTURE" name="CONTACT_BACK">
      <location unit="M">
        <x> 0.15</x>
        <y> 0   </y>
        <z>-0.1 </z>
      </location>
      <static_friction>  0.8 </static_friction>
      <dynamic_friction> 0.5 </dynamic_friction>
      <spring_coeff unit="N/M"> 500 </spring_coeff>
      <damping_coeff unit="N/M/SEC"> 100 </damping_coeff>
      <damping_coeff_rebound type="SQUARE" unit="N/M2/SEC2"> 1000 </damping_coeff_rebound>
      <max_steer unit="DEG"> 0.0 </max_steer>
      <brake_group> NONE </brake_group>
      <retractable>0</retractable>
    </contact>

    <contact type="STRUCTURE" name="CONTACT_RIGHT">
      <location unit="M">
        <x> 0.  </x>
        <y> 0.15</y>
        <z>-0.1 </z>
      </location>
      <static_friction>  0.8 </static_friction>
      <dynamic_friction> 0.5 </dynamic_friction>
      <spring_coeff unit="N/M"> 500 </spring_coeff>
      <damping_coeff unit="N/M/SEC"> 100 </damping_coeff>
      <damping_coeff_rebound type="SQUARE" unit="N/M2/SEC2"> 1000 </damping_coeff_rebound>
      <max_steer unit="DEG"> 0.0 </max_steer>
      <brake_group> NONE </brake_group>
      <retractable>0</retractable>
    </contact>

    <contact type="STRUCTURE" name="CONTACT_LEFT">
      <location unit="M">
        <x> 0.  </x>
        <y>-0.15</y>
        <z>-0.1 </z>
      </location>
      <static_friction>  0.8 </static_friction>
      <dynamic_friction> 0.5 </dynamic_friction>
      <spring_coeff unit="N/M"> 500 </spring_coeff>
      <damping_coeff unit="N/M/SEC"> 100 </damping_coeff>
      <damping_coeff_rebound type="SQUARE" unit="N/M2/SEC2"> 1000 </damping_coeff_rebound>
      <max_steer unit="DEG"> 0.0 </max_steer>
      <brake_group> NONE </brake_group>
      <retractable>0</retractable>
    </contact>
  </ground_reactions>

  <flight_control name="actuator_dynamics">
    <channel name="filtering">

      <!--First order filter represents actuator dynamics-->
      <lag_filter name="ele_left_lag">
        <input> fcs/ele_left </input>
        <c1> 21 </c1>
        <output> fcs/ele_left_lag</output>
      </lag_filter>
      <lag_filter name="ele_right_lag">
        <input> fcs/ele_right </input>
        <c1> 21 </c1>
        <output> fcs/ele_right_lag</output>
      </lag_filter>
      <lag_filter name="mot_right_lag">
        <input> fcs/mot_right </input>
        <c1> 13 </c1>
        <output> fcs/mot_right_lag</output>
      </lag_filter>
      <lag_filter name="mot_left_lag">
        <input> fcs/mot_left </input>
        <c1> 13 </c1>
        <output> fcs/mot_left_lag</output>
      </lag_filter>
    </channel>
  </flight_control>

  <external_reactions>

    <property>fcs/ele_left</property>
    <property>fcs/ele_left_lag</property>
    <property>fcs/ele_right</property>
    <property>fcs/ele_right_lag</property>
    <property>fcs/mot_right</property>
    <property>fcs/mot_right_lag</property>
    <property>fcs/mot_left</property>
    <property>fcs/mot_left_lag</property>


    <!-- First the lift forces produced by each propeller -->

    <force name="mot_right" frame="BODY" unit="LBS">
      <function>
        <product>
          <property>fcs/mot_right_lag</property>
          <value> 0.8 </value>
        </product>
      </function>
      <location unit="IN">
        <x>0</x>
        <y>5.51</y>
        <z>0</z>
      </location>
      <direction>
        <x>0</x>
        <y>0</y>
        <z>-1</z>
      </direction>
    </force>

    <force name="mot_left" frame="BODY" unit="LBS">
      <function>
        <product>
          <property>fcs/mot_left_lag</property>
          <value> 0.8 </value>
        </product>
      </function>
      <location unit="IN">
        <x>0</x>
        <y>-5.51</y>
        <z>0</z>
      </location>
      <direction>
        <x>0</x>
        <y>0</y>
        <z>-1</z>
      </direction>
    </force>

    <!-- Then the Moment Couples -->

    <!--Pitch moments-->

    <force name="ele_left_pitch1" frame="BODY" unit="LBS">
      <function>
        <product>
          <property>fcs/ele_left_lag</property>
          <value> -0.5 </value>
        </product>
      </function>
      <location unit="IN">
        <!-- Necessary arm in IN to produce a moment ten times
        "weaker" then the force when both are measured in the SI is 1.9685 in. -->
        <x>0</x>
        <y>0</y>
        <z>1</z>
      </location>
      <direction>
        <x>-1</x>
        <y>0</y>
        <z>0</z>
      </direction>
    </force>

    <force name="ele_left_pitch2" frame="BODY" unit="LBS">
      <function>
        <product>
          <property>fcs/ele_left_lag</property>
          <value> -0.5 </value>
        </product>
      </function>
      <location unit="IN">
        <x>0</x>
        <y>0</y>
        <z>0</z>
      </location>
      <direction>
        <x>1</x>
        <y>0</y>
        <z>0</z>
      </direction>
    </force>

    <force name="ele_right_pitch1" frame="BODY" unit="LBS">
      <function>
        <product>
          <property>fcs/ele_right_lag</property>
          <value> 0.5 </value>
        </product>
      </function>
      <location unit="IN">
        <!-- Necessary arm in IN to produce a moment ten times
        "weaker" then the force when both are measured in the SI is 1.9685 in. -->
        <x>0</x>
        <y>0</y>
        <z>1</z>
      </location>
      <direction>
        <x>-1</x>
        <y>0</y>
        <z>0</z>
      </direction>
    </force>

    <force name="ele_right_pitch2" frame="BODY" unit="LBS">
      <function>
        <product>
          <property>fcs/ele_right_lag</property>
          <value> 0.5 </value>
        </product>
      </function>
      <location unit="IN">
        <x>0</x>
        <y>0</y>
        <z>0</z>
      </location>
      <direction>
        <x>1</x>
        <y>0</y>
        <z>0</z>
      </direction>
    </force>

    <!--Yaw moments-->

    <force name="ele_left_yaw1" frame="BODY" unit="LBS">
      <function>
        <product>
          <property>fcs/ele_left_lag</property>
          <value>0.325</value>
        </product>
      </function>
      <location unit="IN">
        <!-- Necessary arm in IN to produce a moment ten times
        "weaker" then the force when both are measured in the SI is 1.9685 in. -->
        <x>0</x>
        <y>1</y>
        <z>0</z>
      </location>
      <direction>
        <x>1</x>
        <y>0</y>
        <z>0</z>
      </direction>
    </force>

    <force name="ele_left_yaw2" frame="BODY" unit="LBS">
      <function>
        <product>
          <property>fcs/ele_left_lag</property>
          <value>0.325</value>
        </product>
      </function>
      <location unit="IN">
        <x>0</x>
        <y>0</y>
        <z>0</z>
      </location>
      <direction>
        <x>-1</x>
        <y>0</y>
        <z>0</z>
      </direction>
    </force>

    <force name="ele_right_yaw1" frame="BODY" unit="LBS">
      <function>
        <product>
          <property>fcs/ele_right_lag</property>
          <value>0.325</value>
        </product>
      </function>
      <location unit="IN">
        <!-- Necessary arm in IN to produce a moment ten times
        "weaker" then the force when both are measured in the SI is 1.9685 in. -->
        <x>0</x>
        <y>1</y>
        <z>0</z>
      </location>
      <direction>
        <x>1</x>
        <y>0</y>
        <z>0</z>
      </direction>
    </force>

    <force name="ele_right_yaw2" frame="BODY" unit="LBS">
      <function>
        <product>
          <property>fcs/ele_right_lag</property>
          <value>0.325</value>
        </product>
      </function>
      <location unit="IN">
        <x>0</x>
        <y>0</y>
        <z>0</z>
      </location>
      <direction>
        <x>-1</x>
        <y>0</y>
        <z>0</z>
      </direction>
    </force>
  </external_reactions>

  <propulsion/>

  <flight_control name="FGFCS"/>

  <!--<aerodynamics>-->
    <!--<axis name="DRAG">-->
      <!--<function name="aero/coefficient/CD">-->
        <!--<description>Drag</description>-->
        <!--<product>-->
          <!--<property>aero/qbar-psf</property>-->
          <!--<value>47.9</value> [> Conversion to pascals <]-->
          <!--<value>0.0151</value> [> CD x Area (m^2) <]-->
          <!--<value>0.224808943</value> [> N to LBS <]-->
        <!--</product>-->
      <!--</function>-->
    <!--</axis>-->
  <!--</aerodynamics>-->
  <aerodynamics file="Systems/aerodynamics_mini_cyclone.xml"/>

</fdm_config>
